// SBML level 3 version 2

model bioscrape_generated_model_820531()
  // model units - substance: mole, time: second, volume: litre, area: square_metre, length: metre, extent: mole

  // Compartments:
  compartment default = 1e-6;

  // Species:
  species Biomass in default = 1000;
  species Glucose_external in default = 60220000;
  species Glucose_internal in default = 0;
  species Lactose_consumed in default = 0;
  species Lactose_external in default = 120440000;
  species Lactose_internal in default = 0;
  species dna_Lac_Operon in default = 2;
  species monomer_betaGal in default = 0;
  species protein_Lactose_Permease in default = 0;
  species protein_betaGal in default = 0;
  species rna_M in default = 0;

  // Parameters:
  BGal_tetramerization__ = 1000;
  BGal_vmax__ = 300;
  Bgal_Kd__ = 84310;
  GluPermease_Kd = 9033;
  GluPermease_Kd__ = 9033;
  GluPermease_vmax__ = 301;
  K_G = 1506;
  K_L = 2900000;
  LacPermease_Kd = 156576;
  LacPermease_Kd__ = 8800000;
  LacPermease_reverse_vmax__ = 1.189667;
  LacPermease_vmax = 35.8;
  Vtx = 0.003;
  k_leak = 0.05;
  k_tl_beta_Gal__ = 0.1566667;
  k_tl_lacP__ = 0.3133333;
  kdeg_mRNA__ = 0.007833333;
  kdeg_prot__ = 0.0001666667;
  n = 1;
  n_G = 2;
  n_L = 4;
  n_r5 = 1;
  n_r7 = 1;
  phi_G = 0.35;

  // Reactions:
  r0: dna_Lac_Operon => dna_Lac_Operon + rna_M; dna_Lac_Operon*Vtx*(k_leak + Lactose_internal^n_L/(K_L^n_L + Lactose_internal^n_L)*(1/(1 + (Glucose_external/K_G)^n_G)));  // modifiers: Lactose_internal, Glucose_external
  r1: rna_M => rna_M + monomer_betaGal; k_tl_beta_Gal__*rna_M;
  r2: rna_M => rna_M + protein_Lactose_Permease; k_tl_lacP__*rna_M;
  r3: 4 monomer_betaGal => protein_betaGal; BGal_tetramerization__*monomer_betaGal*(monomer_betaGal - 1)*(monomer_betaGal - 2)*(monomer_betaGal - 3);
  r4: Lactose_internal => Lactose_consumed; BGal_vmax__*protein_betaGal*Lactose_internal^n/(Bgal_Kd__^n + Lactose_internal^n);  // modifiers: protein_betaGal
  r5: Glucose_external => Glucose_internal; GluPermease_vmax__*Biomass*Glucose_external^n_r5/(GluPermease_Kd__^n_r5 + Glucose_external^n_r5);  // modifiers: Biomass
  r6: Lactose_external => Lactose_internal; protein_Lactose_Permease*LacPermease_vmax*Lactose_external/(Lactose_external + LacPermease_Kd)*(1 - phi_G*Glucose_external/(GluPermease_Kd + Glucose_external));  // modifiers: protein_Lactose_Permease, Glucose_external
  r7: Lactose_internal => Lactose_external; LacPermease_reverse_vmax__*protein_Lactose_Permease*Lactose_internal^n_r7/(LacPermease_Kd__^n_r7 + Lactose_internal^n_r7);  // modifiers: protein_Lactose_Permease
  r8: rna_M => ; kdeg_mRNA__*rna_M;
  r9: protein_betaGal => ; kdeg_prot__*protein_betaGal;
  r10: protein_Lactose_Permease => ; kdeg_prot__*protein_Lactose_Permease;

  // Unit definitions:
  unit square_metre = metre^2;
end
