// SBML level 3 version 2

model bioscrape_generated_model_948982()
  // model units - substance: mole, time: second, volume: litre, area: square_metre, length: metre, extent: mole

  // Compartments:
  compartment default = 1e-6;

  // Species:
  species G in default = 1;
  species P in default = 0;
  species R in default = 100;
  species T in default = 0;

  // Parameters:
  DummyVar_PositiveProportionalHillPropensity_n_0 = 1;
  K = 10;
  delta = 0.001;
  k_tl = 0.1;
  k_tx = 0.05;

  // Reactions:
  r0: G => G + T; k_tx*G;
  r1: T => T + P; k_tl*R*G^n/(G^DummyVar_PositiveProportionalHillPropensity_n_0 + K);  // modifiers: G, R
  r2: T => ; delta*T;
  r3: P => ; delta*P;

  // Unit definitions:
  unit square_metre = metre^2;
end
